# Решение дифференциального уравнения методом Рунге-Кутта | После git clone
zat(x, y) := 2*(x^2 + y)
yy := 1
methodRungeKutt(func, startVal, a, b, h) :=
    n ← (b - a)/h
    y[0] ← startVal
    for ii ∈ 0 .. n
        x[ii] ← ii*h
        kk1 ← func(x[ii], y[ii])
        kk2 ← func(x[ii] + h/2, y[ii] + h*kk1/2)
        kk3 ← func(x[ii] + h/2, y[ii] + h*kk2/2)
        kk4 ← func(x[ii] + h, y[ii] + h*kk3)
        y[ii + 1] ← y[ii] + h/6*(kk1 + 2*kk2 + 2*kk3 + kk4)
        AA[ii] ← y[ii]
    return AA[n]
D(t, yy) := 2*(t^2 + yy)
M := 1000
resh := rkfixed(yy, 0, 1, M, D)
resh = [
    0, 1;
    0.001, 1.002;
    0.002, 1.00401;
    0.003, 1.00602;
    0.004, 1.00803;
    0.005, 1.01005;
    0.006, 1.01207;
    0.007, 1.0141;
    0.008, 1.01613;
    0.009, 1.01816
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]
resh[:, 1][M] = 8.58358
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methodRungeKutt(zat, 1, 0, 1, 0.01) = 8.58358
